// Links to the tested leg, so that the rest of the model does not need to know which side it is.
// Included inside Main, after the human model. TESTED_LEG_IS_RIGHT is set in Position.any.
#if TESTED_LEG_IS_RIGHT == 1
AnyFolder &TestedLeg = Main.HumanModel.BodyModel.Right.Leg;
AnyFolder &TestedInterface = Main.HumanModel.BodyModel.Interface.Right;
#else
AnyFolder &TestedLeg = Main.HumanModel.BodyModel.Left.Leg;
AnyFolder &TestedInterface = Main.HumanModel.BodyModel.Interface.Left;
#endif
